// SBML level 3 version 2

model combined_model_of__combined_model_of__combined_model_of__combined_model_of__combined_model_of__combined_model_of__biocrnpyler_676164_biocrnpyler_658720_biocrnpyler_295210_biocrnpyler_617483_biocrnpyler_708139_biocrnpyler_252167_biocrnpyler_983878()
  // model units - substance: mole, time: second, volume: litre, area: square_metre, length: metre, extent: mole

  // Compartments:
  compartment default_atpsyn_txtlbiocrnpyler_676164_combined_combined = 7e-6;
  compartment default_atpsynthesisbiocrnpyler_295210 = 1e-6;
  compartment default_atp_usebiocrnpyler_617483 = 1e-6;
  compartment default_combined_combined = 3e-6;
  compartment default_pp_txtlbiocrnpyler_708139 = 1e-6;
  compartment default_combined_combined_1 = 4e-6;
  compartment default_pp_mibiocrnpyler_252167 = 1e-6;
  compartment default_combined_combined_2 = 5e-6;
  compartment default_protontransportbiocrnpyler_983878 = 1e-6;
  compartment default_combined_combined_3 = 6e-6;

  // Species:
  species rna_atpsyn_atpsyn_txtlbiocrnpyler_676164 in default_atpsyn_txtlbiocrnpyler_676164_combined_combined = 0;
  species dna_atpsyn_atpsyn_txtlbiocrnpyler_676164 in default_atpsyn_txtlbiocrnpyler_676164_combined_combined = 10/default_atpsyn_txtlbiocrnpyler_676164_combined_combined;
  species complex_dna_atpsyn_protein_RNAP_machinery_atpsyn_txtlbiocrnpyler_676164 in default_atpsyn_txtlbiocrnpyler_676164_combined_combined = 0;
  species complex_protein_Ribo_machinery_rna_atpsyn_atpsyn_txtlbiocrnpyler_676164 in default_atpsyn_txtlbiocrnpyler_676164_combined_combined = 0;
  species complex_protein_RNAse_machinery_rna_atpsyn_atpsyn_txtlbiocrnpyler_676164 in default_atpsyn_txtlbiocrnpyler_676164_combined_combined = 0;
  species protein_atpsyn_atpsyn_txtlbiocrnpyler_676164_1_combined in default_atpsyn_txtlbiocrnpyler_676164_combined_combined = 0;
  species protein_atpsyn_b_atpsyn_mibiocrnpyler_658720_1_combined in default_atpsynthesisbiocrnpyler_295210 = 0;
  species rna_proton_pump_pp_txtlbiocrnpyler_708139 in default_pp_txtlbiocrnpyler_708139 = 0;
  species dna_proton_pump_pp_txtlbiocrnpyler_708139 in default_pp_txtlbiocrnpyler_708139 = 10/default_pp_txtlbiocrnpyler_708139;
  species protein_RNAP_machinery_atpsyn_txtlbiocrnpyler_676164_1_combined in default_pp_txtlbiocrnpyler_708139 = 10/default_pp_txtlbiocrnpyler_708139;
  species protein_Ribo_machinery_atpsyn_txtlbiocrnpyler_676164_1_combined in default_pp_txtlbiocrnpyler_708139 = 10/default_pp_txtlbiocrnpyler_708139;
  species protein_RNAse_machinery_atpsyn_txtlbiocrnpyler_676164_1_combined in default_pp_txtlbiocrnpyler_708139 = 10/default_pp_txtlbiocrnpyler_708139;
  species complex_dna_proton_pump_protein_RNAP_machinery_pp_txtlbiocrnpyler_708139 in default_pp_txtlbiocrnpyler_708139 = 0;
  species complex_protein_Ribo_machinery_rna_proton_pump_pp_txtlbiocrnpyler_708139 in default_pp_txtlbiocrnpyler_708139 = 0;
  species complex_protein_RNAse_machinery_rna_proton_pump_pp_txtlbiocrnpyler_708139 in default_pp_txtlbiocrnpyler_708139 = 0;
  species protein_proton_pump_pp_txtlbiocrnpyler_708139_1_combined in default_pp_mibiocrnpyler_252167 = 0;
  species protein_proton_pump_b_pp_mibiocrnpyler_252167 in default_pp_mibiocrnpyler_252167 = 0;
  species proton_outside_H_atpsynthesisbiocrnpyler_295210_1_combined in default_protontransportbiocrnpyler_983878 = 10/default_protontransportbiocrnpyler_983878;
  species proton_inside_H_atpsynthesisbiocrnpyler_295210_1_combined in default_protontransportbiocrnpyler_983878 = 0;
  species metabolite_adp_atpsynthesisbiocrnpyler_295210_1_combined_1_combined in default_protontransportbiocrnpyler_983878 = 0;
  species metabolite_atp_atpsynthesisbiocrnpyler_295210_1_combined_1_combined in default_protontransportbiocrnpyler_983878 = 10/default_protontransportbiocrnpyler_983878;
  species metabolite_pi_atpsynthesisbiocrnpyler_295210_1_combined_1_combined in default_protontransportbiocrnpyler_983878 = 0;

  // Reactions:
  r0_atpsyn_txtlbiocrnpyler_676164: dna_atpsyn_atpsyn_txtlbiocrnpyler_676164 + protein_RNAP_machinery_atpsyn_txtlbiocrnpyler_676164_1_combined => complex_dna_atpsyn_protein_RNAP_machinery_atpsyn_txtlbiocrnpyler_676164; r0_atpsyn_txtlbiocrnpyler_676164_k*dna_atpsyn_atpsyn_txtlbiocrnpyler_676164*protein_RNAP_machinery_atpsyn_txtlbiocrnpyler_676164_1_combined;
    r0_atpsyn_txtlbiocrnpyler_676164_k = 0.0002564103;
  r1_atpsyn_txtlbiocrnpyler_676164: complex_dna_atpsyn_protein_RNAP_machinery_atpsyn_txtlbiocrnpyler_676164 => rna_atpsyn_atpsyn_txtlbiocrnpyler_676164 + protein_RNAP_machinery_atpsyn_txtlbiocrnpyler_676164_1_combined; r1_atpsyn_txtlbiocrnpyler_676164_k*complex_dna_atpsyn_protein_RNAP_machinery_atpsyn_txtlbiocrnpyler_676164;
    r1_atpsyn_txtlbiocrnpyler_676164_k = 0.05;
  r2_atpsyn_txtlbiocrnpyler_676164: rna_atpsyn_atpsyn_txtlbiocrnpyler_676164 + protein_Ribo_machinery_atpsyn_txtlbiocrnpyler_676164_1_combined => complex_protein_Ribo_machinery_rna_atpsyn_atpsyn_txtlbiocrnpyler_676164; r2_atpsyn_txtlbiocrnpyler_676164_k*rna_atpsyn_atpsyn_txtlbiocrnpyler_676164*protein_Ribo_machinery_atpsyn_txtlbiocrnpyler_676164_1_combined;
    r2_atpsyn_txtlbiocrnpyler_676164_k = 100;
  r3_atpsyn_txtlbiocrnpyler_676164: complex_protein_Ribo_machinery_rna_atpsyn_atpsyn_txtlbiocrnpyler_676164 => rna_atpsyn_atpsyn_txtlbiocrnpyler_676164 + protein_atpsyn_atpsyn_txtlbiocrnpyler_676164_1_combined + protein_Ribo_machinery_atpsyn_txtlbiocrnpyler_676164_1_combined; r3_atpsyn_txtlbiocrnpyler_676164_k*complex_protein_Ribo_machinery_rna_atpsyn_atpsyn_txtlbiocrnpyler_676164;
    r3_atpsyn_txtlbiocrnpyler_676164_k = 0.05;
  r4_atpsyn_txtlbiocrnpyler_676164: rna_atpsyn_atpsyn_txtlbiocrnpyler_676164 + protein_RNAse_machinery_atpsyn_txtlbiocrnpyler_676164_1_combined => complex_protein_RNAse_machinery_rna_atpsyn_atpsyn_txtlbiocrnpyler_676164; r4_atpsyn_txtlbiocrnpyler_676164_k*rna_atpsyn_atpsyn_txtlbiocrnpyler_676164*protein_RNAse_machinery_atpsyn_txtlbiocrnpyler_676164_1_combined;
    r4_atpsyn_txtlbiocrnpyler_676164_k = 100;
  r5_atpsyn_txtlbiocrnpyler_676164: complex_protein_RNAse_machinery_rna_atpsyn_atpsyn_txtlbiocrnpyler_676164 => protein_RNAse_machinery_atpsyn_txtlbiocrnpyler_676164_1_combined; r5_atpsyn_txtlbiocrnpyler_676164_k*complex_protein_RNAse_machinery_rna_atpsyn_atpsyn_txtlbiocrnpyler_676164;
    r5_atpsyn_txtlbiocrnpyler_676164_k = 0.001;
  r0_atpsyn_mibiocrnpyler_658720: protein_atpsyn_atpsyn_txtlbiocrnpyler_676164_1_combined => protein_atpsyn_b_atpsyn_mibiocrnpyler_658720_1_combined; r0_atpsyn_mibiocrnpyler_658720_k*protein_atpsyn_atpsyn_txtlbiocrnpyler_676164_1_combined;
    r0_atpsyn_mibiocrnpyler_658720_k = 0.0003;
  r0_atpsynthesisbiocrnpyler_295210: 4 proton_outside_H_atpsynthesisbiocrnpyler_295210_1_combined + metabolite_adp_atpsynthesisbiocrnpyler_295210_1_combined_1_combined + metabolite_pi_atpsynthesisbiocrnpyler_295210_1_combined_1_combined + protein_atpsyn_b_atpsyn_mibiocrnpyler_658720_1_combined => 4 proton_inside_H_atpsynthesisbiocrnpyler_295210_1_combined + metabolite_atp_atpsynthesisbiocrnpyler_295210_1_combined_1_combined + protein_atpsyn_b_atpsyn_mibiocrnpyler_658720_1_combined; r0_atpsynthesisbiocrnpyler_295210_k*proton_outside_H_atpsynthesisbiocrnpyler_295210_1_combined^4*metabolite_adp_atpsynthesisbiocrnpyler_295210_1_combined_1_combined*metabolite_pi_atpsynthesisbiocrnpyler_295210_1_combined_1_combined*protein_atpsyn_b_atpsyn_mibiocrnpyler_658720_1_combined;
    r0_atpsynthesisbiocrnpyler_295210_k = 100;
  r0_atp_usebiocrnpyler_617483: metabolite_atp_atpsynthesisbiocrnpyler_295210_1_combined_1_combined => metabolite_adp_atpsynthesisbiocrnpyler_295210_1_combined_1_combined + metabolite_pi_atpsynthesisbiocrnpyler_295210_1_combined_1_combined; r0_atp_usebiocrnpyler_617483_k*metabolite_atp_atpsynthesisbiocrnpyler_295210_1_combined_1_combined;
    r0_atp_usebiocrnpyler_617483_k = 5;
  r0_pp_txtlbiocrnpyler_708139: dna_proton_pump_pp_txtlbiocrnpyler_708139 + protein_RNAP_machinery_atpsyn_txtlbiocrnpyler_676164_1_combined => complex_dna_proton_pump_protein_RNAP_machinery_pp_txtlbiocrnpyler_708139; r0_pp_txtlbiocrnpyler_708139_k*dna_proton_pump_pp_txtlbiocrnpyler_708139*protein_RNAP_machinery_atpsyn_txtlbiocrnpyler_676164_1_combined;
    r0_pp_txtlbiocrnpyler_708139_k = 0.0002564103;
  r1_pp_txtlbiocrnpyler_708139: complex_dna_proton_pump_protein_RNAP_machinery_pp_txtlbiocrnpyler_708139 => rna_proton_pump_pp_txtlbiocrnpyler_708139 + protein_RNAP_machinery_atpsyn_txtlbiocrnpyler_676164_1_combined; r1_pp_txtlbiocrnpyler_708139_k*complex_dna_proton_pump_protein_RNAP_machinery_pp_txtlbiocrnpyler_708139;
    r1_pp_txtlbiocrnpyler_708139_k = 0.05;
  r2_pp_txtlbiocrnpyler_708139: rna_proton_pump_pp_txtlbiocrnpyler_708139 + protein_Ribo_machinery_atpsyn_txtlbiocrnpyler_676164_1_combined => complex_protein_Ribo_machinery_rna_proton_pump_pp_txtlbiocrnpyler_708139; r2_pp_txtlbiocrnpyler_708139_k*rna_proton_pump_pp_txtlbiocrnpyler_708139*protein_Ribo_machinery_atpsyn_txtlbiocrnpyler_676164_1_combined;
    r2_pp_txtlbiocrnpyler_708139_k = 100;
  r3_pp_txtlbiocrnpyler_708139: complex_protein_Ribo_machinery_rna_proton_pump_pp_txtlbiocrnpyler_708139 => rna_proton_pump_pp_txtlbiocrnpyler_708139 + protein_proton_pump_pp_txtlbiocrnpyler_708139_1_combined + protein_Ribo_machinery_atpsyn_txtlbiocrnpyler_676164_1_combined; r3_pp_txtlbiocrnpyler_708139_k*complex_protein_Ribo_machinery_rna_proton_pump_pp_txtlbiocrnpyler_708139;
    r3_pp_txtlbiocrnpyler_708139_k = 0.05;
  r4_pp_txtlbiocrnpyler_708139: rna_proton_pump_pp_txtlbiocrnpyler_708139 + protein_RNAse_machinery_atpsyn_txtlbiocrnpyler_676164_1_combined => complex_protein_RNAse_machinery_rna_proton_pump_pp_txtlbiocrnpyler_708139; r4_pp_txtlbiocrnpyler_708139_k*rna_proton_pump_pp_txtlbiocrnpyler_708139*protein_RNAse_machinery_atpsyn_txtlbiocrnpyler_676164_1_combined;
    r4_pp_txtlbiocrnpyler_708139_k = 100;
  r5_pp_txtlbiocrnpyler_708139: complex_protein_RNAse_machinery_rna_proton_pump_pp_txtlbiocrnpyler_708139 => protein_RNAse_machinery_atpsyn_txtlbiocrnpyler_676164_1_combined; r5_pp_txtlbiocrnpyler_708139_k*complex_protein_RNAse_machinery_rna_proton_pump_pp_txtlbiocrnpyler_708139;
    r5_pp_txtlbiocrnpyler_708139_k = 0.001;
  r0_pp_mibiocrnpyler_252167: protein_proton_pump_pp_txtlbiocrnpyler_708139_1_combined => protein_proton_pump_b_pp_mibiocrnpyler_252167; r0_pp_mibiocrnpyler_252167_k*protein_proton_pump_pp_txtlbiocrnpyler_708139_1_combined;
    r0_pp_mibiocrnpyler_252167_k = 0.0003;
  r0_protontransportbiocrnpyler_983878: 4 proton_inside_H_atpsynthesisbiocrnpyler_295210_1_combined => 4 proton_outside_H_atpsynthesisbiocrnpyler_295210_1_combined; r0_protontransportbiocrnpyler_983878_k*proton_inside_H_atpsynthesisbiocrnpyler_295210_1_combined^4;
    r0_protontransportbiocrnpyler_983878_k = 100;

  // Unit definitions:
  unit square_metre = metre^2;
end
